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/batch
! ANSYS input file written by Workbench version 2025 R2
! File used for geometry attach: C:\Users\dipes\OneDrive\Documents\Machine Learning\Python\fea_cases\case_0001\blade_case_0001.step
/title,wbnew--Static Structural (A5)
/COM,/COM,     ANSYSMotion, 2025.2
/com,--- Data in consistent MKS units. See Solving Units in the help system for more information.
/units,MKS
/prep7
! Turn off shape checking because checks already performed inside WB mesher.
! See help system for more information.
SHPP,OFF,,NOWARN
etcon,set             ! allow ANSYS to choose best KEYOP's for 180x elements, resets any applicable keyopt to MAPDL defaults
/com,*********** Send User Defined Coordinate System(s) ***********
csys,0
/com,*********** Nodes for the whole assembly ***********
nblock,3,,11085
(1i9,3e20.9e3)
        1     3.514553884E-02     1.076223116E-02     1.427820642E-01
        2     2.603161937E-02     1.033137000E-02     1.053725945E-01
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-1
/com,*********** Elements for Body 1 'Open CASCADE STEP translator 7.9 1|Surface' ***********
et,1,181
keyo,1,1,0          ! bending and membrane stiffness
keyo,1,3,2
MAT,1 $ TYPE,1 $ REAL,1 $ SECNUM,1 $ ESYS,0
eblock,11,COMPACT,,19961
(11i9)
        1     5206     4346        3        3
        2     7116     5798     7735     7735
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-1
secnum,1    ! reset the section ID to default
toffst,273.15,      ! Temperature offset from absolute zero
/com,*********** Set Reference Temperature ***********
tref,22.
/com,*********** Send Materials ***********
Temperature = 'TEMP' ! Temperature
MP,DENS,1,7850,	! kg m^-3
MP,ALPX,1,1.2e-05,	! C^-1
MP,C,1,434,	! J kg^-1 C^-1
MP,KXX,1,60.5,	! W m^-1 C^-1
MP,RSVX,1,1.7e-07,	! kg m^3 A^-2 s^-3
MP,EX,1,200000000000,	! Pa
MP,NUXY,1,0.3,
MP,MURX,1,10000,

/com,*********** Send Sheet Properties ***********
sectype,1,shell
secdata,2.e-002
secoff,mid

!************************* Model Summary ********************
!Open CASCADE STEP translator 7.9 1|Surface,	Structural Steel,	matid,	1
!************************* End Model Summary ********************
/com,*********** Send Named Selection as Node Component ***********
CMBLOCK,LOAD_FACE,NODE,        2
(8i10)
         1    -10078
/com,*********** Send Named Selection as Node Component ***********
CMBLOCK,ROOT_FACE,NODE,      110
(8i10)
        19       280       306       310       316       318       369       372
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/com,*********** Send Named Selection as Element Component ***********
esel,s,type,,1
cm,BLADE_BODY,elem
esel,all
/com,*********** Fixed Supports ***********
CMBLOCK,_FIXEDSU,NODE,      110
(8i10)
        19       280       306       310       316       318       369       372
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cmsel,s,_FIXEDSU
d,all,all
nsel,all
/com,*********** Define Pressure Using Surface Effect Elements "Pressure" ***********
et,2,154
MAT,2 $ TYPE,2 $ REAL,2 $ SECNUM,2 $ ESYS,0
eblock,11,COMPACT,,19961
(11i9)
    19962     5206     4346        3        3
    19963     7116     5798     7735     7735
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-1
secnum,1    ! reset the section ID to default
esel,s,type,,2
keyop,2,7,0         ! Use deformed area for application of load
esel,all
esel,all
fini
/com,****************************************************************************
/com,*************************    SOLUTION       ********************************
/com,****************************************************************************
/solu
antype,0                   ! static analysis
_thickRatio=  0     ! Ratio of thick parts in the model
eqsl,sparse,,,,,1
cntr,print,1               ! print out contact info and also make no initial contact an error
cncheck,dmp		!	Enable program controlled contact splitting for distributed memory parallel run
dmpoption,emat,no             ! Don't combine emat file for DANSYS
dmpoption,esav,no             ! Don't combine esav file for DANSYS
nldiag,cont,iter           ! print out contact info each equilibrium iteration
rescontrol,,none                 ! Do not keep any restart files
/com,****************************************************
/com,******************* SOLVE FOR LS 1 OF 1 ****************
esel,s,type,,2
nsle
sf,all,pres,0.1
nsel,all
esel,all
esel,all
nsub,1,1,1
time,1.
outres,erase
outres,all,none
outres,nsol,all,
outres,rsol,all
outres,eangl,all
outres,etmp,all
outres,veng,all
outres,strs,all,
outres,epel,all,
outres,eppl,all,
outres,cont,all,
! *********** WB SOLVE COMMAND ***********
! check interactive state
*get,ANSINTER_,active,,int
*if,ANSINTER_,ne,0,then
/eof
*endif
solve
/com *************** Write FE CONNECTORS *********
CEWRITE,file,ce,,INTE
/com,****************************************************
/com,*************** FINISHED SOLVE FOR LS 1 *************
*get,_NSOLTHREADS,active,0,ntfs
*get,_NSOLPROCESSES,active,0,npfs
/post1
fini
