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/batch
! ANSYS input file written by Workbench version 2025 R2
! File used for geometry attach: C:\Users\dipes\OneDrive\Documents\Machine Learning\Python\fea_cases\case_0001\blade_case_0001.step
/title,Blade_Body--Static Structural (A5)
/COM,/COM,     ANSYSMotion, 2025.2
/com,--- Data in consistent MKS units. See Solving Units in the help system for more information.
/units,MKS
/prep7
! Turn off shape checking because checks already performed inside WB mesher.
! See help system for more information.
SHPP,OFF,,NOWARN
etcon,set             ! allow ANSYS to choose best KEYOP's for 180x elements, resets any applicable keyopt to MAPDL defaults
/com,*********** Send User Defined Coordinate System(s) ***********
csys,0
/com,*********** Nodes for the whole assembly ***********
nblock,3,,11085
(1i9,3e20.9e3)
        1     3.514553884E-02     1.076223116E-02     1.427820642E-01
        2     2.603161937E-02     1.033137000E-02     1.053725945E-01
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-1
/com,*********** Elements for Body 1 'Open CASCADE STEP translator 7.9 1|Surface' ***********
et,1,181
keyo,1,1,0          ! bending and membrane stiffness
keyo,1,3,2
MAT,1 $ TYPE,1 $ REAL,1 $ SECNUM,1 $ ESYS,0
eblock,11,COMPACT,,19961
(11i9)
        1     5206     4346        3        3
        2     7116     5798     7735     7735
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-1
secnum,1    ! reset the section ID to default
toffst,273.15,      ! Temperature offset from absolute zero
/com,*********** Set Reference Temperature ***********
tref,22.
/com,*********** Send Materials ***********
MPTEMP,,,,,,,,
MPTEMP,1,20
MPTEMP,2,100
MPTEMP,3,200
MPTEMP,4,300
MPTEMP,5,400
MPTEMP,6,500
MPTEMP,7,600
MPTEMP,8,700
MPTEMP,9,800
MPTEMP,10,900
MPTEMP,11,1000
MPTEMP,12,1100
MPTEMP,13,1200
MPTEMP,14,1300
MPTEMP,15,1400
MPTEMP,16,1500
MPTEMP,17,1600
MPDATA,EX,1, ,107000000000,103400000000,99510000000,93710000000,85500000000,74710000000,
MPDATA,EX,1, ,61840000000,48160000000,35290000000,24500000000,16290000000,10490000000,
MPDATA,EX,1, ,6610000000,4106000000,2528000000,1547000000,943500000,	! Pa
MPTEMP,,,,,,,,
MPTEMP,,,,,,,,
MPTEMP,1,20
MPTEMP,2,100
MPTEMP,3,200
MPTEMP,4,300
MPTEMP,5,400
MPTEMP,6,500
MPTEMP,7,600
MPTEMP,8,700
MPTEMP,9,800
MPTEMP,10,900
MPTEMP,11,1000
MPTEMP,12,1100
MPTEMP,13,1200
MPTEMP,14,1300
MPTEMP,15,1400
MPTEMP,16,1500
MPTEMP,17,1600
MPDATA,NUXY,1, ,0.323,0.328,0.334,0.339,0.345,0.351,
MPDATA,NUXY,1, ,0.357,0.363,0.369,0.374,0.38,0.386,
MPDATA,NUXY,1, ,0.392,0.398,0.403,0.409,0.415,
MPTEMP,,,,,,,,
MPTEMP,,,,,,,,
MPTEMP,1,20
MPTEMP,2,100
MPTEMP,3,200
MPTEMP,4,300
MPTEMP,5,400
MPTEMP,6,500
MPTEMP,7,600
MPTEMP,8,700
MPTEMP,9,800
MPTEMP,10,900
MPTEMP,11,1000
MPTEMP,12,1100
MPTEMP,13,1200
MPTEMP,14,1300
MPTEMP,15,1400
MPTEMP,16,1500
MPTEMP,17,1600
MPTEMP,18,1650
MPTEMP,19,1700
MPTEMP,20,1800
MPTEMP,21,1900
MPTEMP,22,1950
MPDATA,KXX,1, ,8.11,7.74,7.52,7.55,7.81,8.29,
MPDATA,KXX,1, ,8.96,9.81,10.82,11.98,13.26,14.65,
MPDATA,KXX,1, ,16.13,17.69,19.29,20.93,22.6,28.53,
MPDATA,KXX,1, ,29.45,31.28,33.11,34.02,	! W m^-1 C^-1
MPDATA,KYY,1, ,8.11,7.74,7.52,7.55,7.81,8.29,
MPDATA,KYY,1, ,8.96,9.81,10.82,11.98,13.26,14.65,
MPDATA,KYY,1, ,16.13,17.69,19.29,20.93,22.6,28.53,
MPDATA,KYY,1, ,29.45,31.28,33.11,34.02,	! W m^-1 C^-1
MPDATA,KZZ,1, ,7.01,7.34,8.02,8.95,10.07,11.36,
MPDATA,KZZ,1, ,12.75,14.21,15.68,17.14,18.52,19.78,
MPDATA,KZZ,1, ,20.88,21.77,22.42,22.76,22.76,28.53,
MPDATA,KZZ,1, ,29.45,31.28,33.11,34.02,	! W m^-1 C^-1
MPTEMP,,,,,,,,
MPTEMP,,,,,,,,
MPTEMP,1,-253.15
MPTEMP,2,-173.15
MPTEMP,3,-73.15
MPTEMP,4,26.85
MPTEMP,5,126.85
MPTEMP,6,226.85
MPTEMP,7,326.85
MPTEMP,8,426.85
MPTEMP,9,526.85
MPTEMP,10,626.85
MPTEMP,11,726.85
MPTEMP,12,826.85
MPTEMP,13,926.85
MPTEMP,14,1026.85
MPTEMP,15,1126.85
MPTEMP,16,1226.85
MPTEMP,17,1326.85
MPTEMP,18,1376.85
MPTEMP,19,1426.85
MPTEMP,20,1526.85
MPTEMP,21,1626.85
MPTEMP,22,1676.85
MPDATA,C,1, ,542.67348,552.065,565.86,581.575,598.82,617.205,
MPDATA,C,1, ,636.34,655.835,675.3,694.345,712.58,729.615,
MPDATA,C,1, ,745.06,758.525,769.62,777.955,783.14,830,
MPDATA,C,1, ,830,830,830,830,	! J kg^-1 C^-1
MPTEMP,,,,,,,,
MPTEMP,,,,,,,,
MPTEMP,1,-233.15
MPTEMP,2,-173.15
MPTEMP,3,19.85
MPTEMP,4,126.85
MPTEMP,5,326.85
MPTEMP,6,526.85
MPTEMP,7,626.86
MPTEMP,8,826.86
MPDATA,ALPX,1, ,6.5e-06,7.1e-06,8.9e-06,9.7e-06,1.08e-05,1.14e-05,
MPDATA,ALPX,1, ,1.16e-05,1.16e-05,	! C^-1
MPTEMP,,,,,,,,
MPAMOD,1,19.85,	! C
MPTEMP,,,,,,,,
MPTEMP,1,20
MPTEMP,2,1227
MPTEMP,3,1777
MPTEMP,4,1877
MPTEMP,5,2127
MPTEMP,6,2500
MPDATA,DENS,1, ,4405,4243,4189,3865,3730,3730,	! kg m^-3
MPTEMP,,,,,,,,

TB,BISO,1,6,
TBTEMP,20
TBDATA,1,1098000000,1332000000
TBTEMP,204
TBDATA,1,844000000,1207000000
TBTEMP,427
TBDATA,1,663000000,1033000000
TBTEMP,538
TBDATA,1,527000000,943000000
TBTEMP,815
TBDATA,1,60000000,708000000
TBTEMP,944
TBDATA,1,21000000,596000000

/com,*********** Send Sheet Properties ***********
sectype,1,shell
secdata,2.e-002
secoff,mid

!************************* Model Summary ********************
!Open CASCADE STEP translator 7.9 1|Surface,	Ti-6Al-4V,	matid,	1
!************************* End Model Summary ********************
/com,*********** Send Named Selection as Node Component ***********
CMBLOCK,LOAD_FACE,NODE,        2
(8i10)
         1    -10078
/com,*********** Send Named Selection as Node Component ***********
CMBLOCK,ROOT_FACE,NODE,      110
(8i10)
        19       280       306       310       316       318       369       372
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/com,*********** Send Named Selection as Element Component ***********
esel,s,type,,1
cm,BLADE_BODY,elem
esel,all
/com,*********** Fixed Supports ***********
CMBLOCK,_FIXEDSU,NODE,       85
(8i10)
         4         6        29        45        49        58        62        81
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cmsel,s,_FIXEDSU
d,all,all
nsel,all
/com,*********** Define Pressure Using Surface Effect Elements "Pressure" ***********
et,2,154
MAT,2 $ TYPE,2 $ REAL,2 $ SECNUM,2 $ ESYS,0
eblock,11,COMPACT,,19961
(11i9)
    19962     5206     4346        3        3
    19963     7116     5798     7735     7735
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-1
secnum,1    ! reset the section ID to default
esel,s,type,,2
keyop,2,7,0         ! Use deformed area for application of load
esel,all
esel,all
tblist
fini
/com,****************************************************************************
/com,*************************    SOLUTION       ********************************
/com,****************************************************************************
/solu
antype,0                   ! static analysis
_thickRatio=  0     ! Ratio of thick parts in the model
eqsl,sparse,,,,,1
cntr,print,1               ! print out contact info and also make no initial contact an error
cncheck,dmp		!	Enable program controlled contact splitting for distributed memory parallel run
dmpoption,emat,no             ! Don't combine emat file for DANSYS
dmpoption,esav,no             ! Don't combine esav file for DANSYS
nldiag,cont,iter           ! print out contact info each equilibrium iteration
rescontrol,define,last,last,,dele	   ! Program Controlled
/com,****************************************************
/com,******************* SOLVE FOR LS 1 OF 1 ****************
esel,s,type,,2
nsle
sf,all,pres,1000000.
nsel,all
esel,all
esel,all
autots,on                  ! Workbench Program Controlled automatic time stepping
nsub,5,1000,1              ! due to presence of nonlinear materials
time,1.
outres,erase
outres,all,none
outres,nsol,all,
outres,rsol,all
outres,eangl,all
outres,etmp,all
outres,veng,all
outres,strs,all,
outres,epel,all,
outres,eppl,all,
outres,cont,all,
RATE,OFF					  ! Creep is turned Off by the user
! *********** WB SOLVE COMMAND ***********
! check interactive state
*get,ANSINTER_,active,,int
*if,ANSINTER_,ne,0,then
/eof
*endif
solve
/com *************** Write FE CONNECTORS *********
CEWRITE,file,ce,,INTE
/com,****************************************************
/com,*************** FINISHED SOLVE FOR LS 1 *************
*get,_NSOLTHREADS,active,0,ntfs
*get,_NSOLPROCESSES,active,0,npfs
/post1
fini
